p := 0.5
p1 := 0.4
p2 := 0.45
P0000 := 0
P0010 := 0
P0110 := 0
P0210 := 0
P0111 := 0
P0211 := 0
P0001 := 0
P0011 := 0
P1210 := 0
P1211 := 0
Given
P0000 == P0001*(p*p2) + P0000*p
P0010 == P0000*(1 - p) + P0001*(1 - p)*p2 + P0011*p*(1 - p1)*p2 + P0010*p*(1 - p1)
P0110 == P0010*(1 - p)*(1 - p1) + P0111*p*(1 - p1)*p2 + P0011*(1 - p)*(1 - p1)*p2 + P0110*p*(1 - p1)
P0210 == P0110*(1 - p)*(1 - p1) + P0111*(1 - p)*(1 - p1)*p2 + P0211*p*(1 - p1)*p2 + P0210*p*(1 - p1)
P0111 == P0110*(1 - p)*p1 + P0210*p*p1 + P0211*(p*(1 - p2)*p1 + p*p1*p2) + P0011*(1 - p)*(1 - p1)*(1 - p2) + P0111*((1 - p)*p1*(1 - p2) + p(1 - p1)*(1 - p2) + (1 - p)*p1*p2)
P0211 == P0210*(1 - p)*p1 + P0111*(1 - p)*(1 - p1)*(1 - p2) + P1210*p1 + P1211*(p1(1 - p2) + p1*p2) + P0211*(p*(1 - p1)*(1 - p2) + (1 - p)*p1(1 - p2) + (1 - p)*p1*p2)
P0001 == P0010*p*p1 + P0011*(p*p1*(1 - p2) + p*p1*p2) + P0001*p*(1 - p2)
P0011 == P0110*p*p1 + P0111*(p*p1*(1 - p2) + p*p1*p2) + P0001*(1 - p)*(1 - p2) + P0011*(p*(1 - p1)*(1 - p2) + (1 - p)*p1*(1 - p2) + (1 - p)*p1*p2) + P0010*(1 - p)*p1
P1210 == P0210*(1 - p)*(1 - p1) + P0211*(1 - p)*(1 - p1)*p2 + P1211*p2*(1 - p1) + P1210*(1 - p1)
P0000 + P0010 + P0110 + P0210 + P0111 + P0211 + P0001 + P0011 + P1210 + P1211 == 1
Find(P0000, P0010, P0110, P0210, P0111, P0211, P0001, P0011, P1210, P1211)  # error: pattern match exception
Q := 1 - 0.0242019925786 = 0.975798
Lоч := (0.0591604263033 + 0.0242019925786)*1 = 0.0833624
Wоч := Lоч/(Q*0.5) = 0.17086
K1 := 1 - 0.204877429786 = 0.795123
K2 := 1 - 0.112682586382 - 0.0954045898038 - 0.0926006327976 - 0.0500555469058 = 0.649257
